f_PLL.in := 8 MHz
PLLM := 8
f_VCO.in := f_PLL.in/PLLM = 1 MHz
PLLN := 240
PLLP := 2
PLLQ := 5
f_VCO.out := f_PLL.in*PLLN/PLLM = 240 MHz
f_PLL.out := f_VCO.out/PLLP = 120 MHz
f_USB := f_VCO.out/PLLQ = 48 MHz
